!!四边简支板的分析

finish
/clear
/filname,ex05a

/prep7
t=0.01          !厚度
b=1.0           !!板宽度
a=1.0           !!板长度
Ex=2.06e11      !!弹性模量
Nu=0.3          !泊松比
pres=1000       !载荷

!定义类型，常数，材料特性
et,1,shell181
r,1,t
mp,ex,1,Ex
mp,prxy,1,Nu

!!建立几何模型
k,1,-a/2,-b/2,0
k,2,a/2,-b/2,0
k,3,a/2,b/2,0
k,4,-a/2,b/2,0
a,1,2,3,4       !!建立一个面

!!单元划分
aatt,1,1,1,0
aesize,all,5*t      !!设置单元划分尺寸
amesh,all

!!施加约束(两边简支边)
DL,2,,uz,0
DL,4,,uz,0

!!给两个非加载边施加约束
DL,1,,uz,0
DL,3,,uz,0
! DL,1,,uy,0
! DL,3,,uy,0
dtran

!!施加x方向的约束，消除刚体位移
nsel,s,loc,x,0,0
nsel,r,loc,y,b/2,b/2
d,all,ux,0
d,all,uy,0
nsel,s,loc,x,0,0
nsel,r,loc,y,-b/2,-b/2
d,all,ux,0
nsel,all
!!施加荷载
SFL,2,PRES,pres
SFL,4,PRES,pres
sftran

!!静力解
/solu
antype,0
pstres,on
solve
finish

!!屈曲分析
/solu
antype,1
bucopt,lanb,4
mxpand,4,,,1
solve

/post1
set,first
plnsol,u,z,0,1.0

!!
